// SBML level 2 version 3

model xyz_04b()

  // Compartments:
  compartment cell = 1;

  // Species:
  species X_y_1_z_2_Y_x_1_z_3_Z_x_2_y_3 in cell = 1/cell; X_y_1_z_2_Y_x_1_z_3_Z_x_2_y_3 is "X(y!1,z!2).Y(x!1,z!3).Z(x!2,y!3)";
  species X_y_1_z_Y_x_1_z in cell = 1/cell; X_y_1_z_Y_x_1_z is "X(y!1,z).Y(x!1,z)";
  species X_y_z in cell = 0; X_y_z is "X(y,z)";
  species Y_x_z in cell = 0; Y_x_z is "Y(x,z)";

  // Parameters:
  _nonrestrictive_local1 = 1;
  _nonrestrictive_local2 = 0;

  // Assignment rules:
  XY := X_y_1_z_2_Y_x_1_z_3_Z_x_2_y_3 + X_y_1_z_Y_x_1_z;
  boundZ := 0 + X_y_1_z_2_Y_x_1_z_3_Z_x_2_y_3;

  // Reactions:
  R1: X_y_1_z_2_Y_x_1_z_3_Z_x_2_y_3 => X_y_z + Y_x_z; _nonrestrictive_local1*X_y_1_z_2_Y_x_1_z_3_Z_x_2_y_3;
  R2: X_y_1_z_Y_x_1_z => X_y_z + Y_x_z; _nonrestrictive_local2*X_y_1_z_Y_x_1_z;

  // Unit definitions:
  unit substance = item;
end
