// SBML level 2 version 1

model simple()

  // Compartments:
  compartment cell = 1;

  // Species:
  species D_r_r in cell = 100; D_r_r is "D(r,r)";
  species M_l in cell = 200; M_l is "M(l)";
  species D_r_1_r_M_l_1 in cell = 0; D_r_1_r_M_l_1 is "D(r!1,r).M(l!1)";
  species D_r_1_r_2_M_l_1_M_l_2 in cell = 0; D_r_1_r_2_M_l_1_M_l_2 is "D(r!1,r!2).M(l!1).M(l!2)";

  // Parameters:
  ob1 = 0;
  ob2 = 0;
  rateLaw1 = 10;

  // Assignment rules:
  Group_ob1 := 0 + D_r_1_r_M_l_1;
  Group_ob2 := 0 + D_r_1_r_2_M_l_1_M_l_2;

  // Reactions:
  R1: D_r_r + M_l => D_r_1_r_M_l_1; 2*rateLaw1*D_r_r*M_l;
  R2: M_l + D_r_1_r_M_l_1 => D_r_1_r_2_M_l_1_M_l_2; rateLaw1*M_l*D_r_1_r_M_l_1;
end
