// SBML level 2 version 1

model simple4()

  // Compartments:
  compartment cell = 1;

  // Species:
  species S1_a_b_c in cell = 1.557664e-12; S1_a_b_c is "S1(a,b,c)";
  species S2_r in cell = 0.002499924; S2_r is "S2(r)";
  species S3_l in cell = 0.002499924; S3_l is "S3(l)";
  species S4_t in cell = 0.002499924; S4_t is "S4(t)";
  species S1_a_1_b_c_S2_r_1 in cell = 6.248843e-8; S1_a_1_b_c_S2_r_1 is "S1(a!1,b,c).S2(r!1)";
  species S1_a_b_1_c_S3_l_1 in cell = 6.248843e-8; S1_a_b_1_c_S3_l_1 is "S1(a,b!1,c).S3(l!1)";
  species S1_a_b_c_1_S4_t_1 in cell = 6.248843e-8; S1_a_b_c_1_S4_t_1 is "S1(a,b,c!1).S4(t!1)";
  species S1_a_1_b_2_c_S2_r_1_S3_l_2 in cell = 0.002499795; S1_a_1_b_2_c_S2_r_1_S3_l_2 is "S1(a!1,b!2,c).S2(r!1).S3(l!2)";
  species S1_a_1_b_c_2_S2_r_1_S4_t_2 in cell = 0.002499795; S1_a_1_b_c_2_S2_r_1_S4_t_2 is "S1(a!1,b,c!2).S2(r!1).S4(t!2)";
  species S1_a_b_1_c_2_S3_l_1_S4_t_2 in cell = 0.002499795; S1_a_b_1_c_2_S3_l_1_S4_t_2 is "S1(a,b!1,c!2).S3(l!1).S4(t!2)";
  species S11 in cell = 99.9925; S11 is "S1(a!1,b!2,c!3).S2(r!1).S3(l!2).S4(t!3)";

  // Parameters:
  obs1 = 0;
  rateLaw1 = 1;
  rateLaw2 = 1;
  rateLaw3 = 1;

  // Assignment rules:
  Group_obs1 := 0 + S11;

  // Reactions:
  R1: S1_a_b_c + S2_r => S1_a_1_b_c_S2_r_1; rateLaw1*S1_a_b_c*S2_r;
  R2: S1_a_b_c + S3_l => S1_a_b_1_c_S3_l_1; rateLaw2*S1_a_b_c*S3_l;
  R3: S1_a_b_c + S4_t => S1_a_b_c_1_S4_t_1; rateLaw3*S1_a_b_c*S4_t;
  R4: S2_r + S1_a_b_1_c_S3_l_1 => S1_a_1_b_2_c_S2_r_1_S3_l_2; rateLaw1*S2_r*S1_a_b_1_c_S3_l_1;
  R5: S2_r + S1_a_b_c_1_S4_t_1 => S1_a_1_b_c_2_S2_r_1_S4_t_2; rateLaw1*S2_r*S1_a_b_c_1_S4_t_1;
  R6: S3_l + S1_a_1_b_c_S2_r_1 => S1_a_1_b_2_c_S2_r_1_S3_l_2; rateLaw2*S3_l*S1_a_1_b_c_S2_r_1;
  R7: S3_l + S1_a_b_c_1_S4_t_1 => S1_a_b_1_c_2_S3_l_1_S4_t_2; rateLaw2*S3_l*S1_a_b_c_1_S4_t_1;
  R8: S4_t + S1_a_1_b_c_S2_r_1 => S1_a_1_b_c_2_S2_r_1_S4_t_2; rateLaw3*S4_t*S1_a_1_b_c_S2_r_1;
  R9: S4_t + S1_a_b_1_c_S3_l_1 => S1_a_b_1_c_2_S3_l_1_S4_t_2; rateLaw3*S4_t*S1_a_b_1_c_S3_l_1;
  R10: S2_r + S1_a_b_1_c_2_S3_l_1_S4_t_2 => S11; rateLaw1*S2_r*S1_a_b_1_c_2_S3_l_1_S4_t_2;
  R11: S3_l + S1_a_1_b_c_2_S2_r_1_S4_t_2 => S11; rateLaw2*S3_l*S1_a_1_b_c_2_S2_r_1_S4_t_2;
  R12: S4_t + S1_a_1_b_2_c_S2_r_1_S3_l_2 => S11; rateLaw3*S4_t*S1_a_1_b_2_c_S2_r_1_S3_l_2;
end
