// SBML level 2 version 1

model simple3()

  // Compartments:
  compartment cell = 1;

  // Species:
  species S1_a_b in cell = 6.250113e-8; S1_a_b is "S1(a,b)";
  species S2_r in cell = 0.002499976; S2_r is "S2(r)";
  species S3_l in cell = 0.002499976; S3_l is "S3(l)";
  species S1_a_1_b_S2_r_1 in cell = 0.002499913; S1_a_1_b_S2_r_1 is "S1(a!1,b).S2(r!1)";
  species S1_a_b_1_S3_l_1 in cell = 0.002499913; S1_a_b_1_S3_l_1 is "S1(a,b!1).S3(l!1)";
  species S1_a_1_b_2_S2_r_1_S3_l_2 in cell = 99.995; S1_a_1_b_2_S2_r_1_S3_l_2 is "S1(a!1,b!2).S2(r!1).S3(l!2)";

  // Parameters:
  obs1 = 0;
  rateLaw1 = 1;
  rateLaw2 = 1;

  // Assignment rules:
  Group_obs1 := 0 + S1_a_1_b_2_S2_r_1_S3_l_2;

  // Reactions:
  R1: S1_a_b + S2_r => S1_a_1_b_S2_r_1; rateLaw1*S1_a_b*S2_r;
  R2: S1_a_b + S3_l => S1_a_b_1_S3_l_1; rateLaw2*S1_a_b*S3_l;
  R3: S2_r + S1_a_b_1_S3_l_1 => S1_a_1_b_2_S2_r_1_S3_l_2; rateLaw1*S2_r*S1_a_b_1_S3_l_1;
  R4: S3_l + S1_a_1_b_S2_r_1 => S1_a_1_b_2_S2_r_1_S3_l_2; rateLaw2*S3_l*S1_a_1_b_S2_r_1;
end
