// SBML level 2 version 1

model Haugh2b()

  // Compartments:
  compartment cell = 1;

  // Species:
  species R_KD_Y1_P in cell = 0.1502973; R_KD_Y1_P is "R(KD,Y1~P)";
  species S1_PTP_SH2 in cell = 0.3987231; S1_PTP_SH2 is "S1(PTP,SH2)";
  species S2_SH2_Y_U in cell = 0.001359495; S2_SH2_Y_U is "S2(SH2,Y~U)";
  species R_KD_Y1_P_1_S1_PTP_SH2_1 in cell = 0.5993296; R_KD_Y1_P_1_S1_PTP_SH2_1 is "R(KD,Y1~P!1).S1(PTP,SH2!1)";
  species R_KD_Y1_P_1_S2_SH2_1_Y_U in cell = 0.1947446; R_KD_Y1_P_1_S2_SH2_1_Y_U is "R(KD,Y1~P!1).S2(SH2!1,Y~U)";
  species R_KD_1_Y1_P_2_S2_SH2_2_Y_U_1 in cell = 0.01947445; R_KD_1_Y1_P_2_S2_SH2_2_Y_U_1 is "R(KD!1,Y1~P!2).S2(SH2!2,Y~U!1)";
  species R_KD_Y1_P_1_S2_SH2_1_Y_P in cell = 0.0322727; R_KD_Y1_P_1_S2_SH2_1_Y_P is "R(KD,Y1~P!1).S2(SH2!1,Y~P)";
  species S2_SH2_Y_P in cell = 0.0002014958; S2_SH2_Y_P is "S2(SH2,Y~P)";
  species S9 in cell = 1.286802e-5; S9 is "R(KD,Y1~P!1).S1(PTP!2,SH2).S2(SH2!1,Y~P!2)";
  species S10 in cell = 0.001934197; S10 is "R(KD,Y1~P!1).R(KD,Y1~P!2).S1(PTP!3,SH2!2).S2(SH2!1,Y~P!3)";
  species S1_PTP_1_SH2_S2_SH2_Y_P_1 in cell = 8.03497e-8; S1_PTP_1_SH2_S2_SH2_Y_P_1 is "S1(PTP!1,SH2).S2(SH2,Y~P!1)";
  species S12 in cell = 1.217972e-7; S12 is "R(KD,Y1~P!1).S1(PTP!2,SH2!1).S2(SH2,Y~P!2)";

  // Parameters:
  kon_S1 = 1;
  koff_S1 = 0.1;
  kon_S2 = 1;
  koff_S2 = 0.001;
  kp1_PTP = 0.1;
  km1_PTP = 90;
  kcat_PTP = 10;
  kp1_KD = 10;
  km1_KD = 99;
  kcat_KD = 1;
  chi_m = 100;
  R_tot = 1;

  // Assignment rules:
  Group_S2_P_tot := R_KD_Y1_P_1_S2_SH2_1_Y_P + S2_SH2_Y_P + S9 + S10 + S1_PTP_1_SH2_S2_SH2_Y_P_1 + S12;
  Group_S2_P_mem := R_KD_Y1_P_1_S2_SH2_1_Y_P + S9 + S10 + S12;
  Group_R_tot := R_KD_Y1_P + R_KD_Y1_P_1_S1_PTP_SH2_1 + R_KD_Y1_P_1_S2_SH2_1_Y_U + R_KD_1_Y1_P_2_S2_SH2_2_Y_U_1 + R_KD_Y1_P_1_S2_SH2_1_Y_P + S9 + 2*S10 + S12;
  Group_S1_tot := S1_PTP_SH2 + R_KD_Y1_P_1_S1_PTP_SH2_1 + S9 + S10 + S1_PTP_1_SH2_S2_SH2_Y_P_1 + S12;
  Group_S2_tot := S2_SH2_Y_U + R_KD_Y1_P_1_S2_SH2_1_Y_U + R_KD_1_Y1_P_2_S2_SH2_2_Y_U_1 + R_KD_Y1_P_1_S2_SH2_1_Y_P + S2_SH2_Y_P + S9 + S10 + S1_PTP_1_SH2_S2_SH2_Y_P_1 + S12;

  // Reactions:
  R1: R_KD_Y1_P + S1_PTP_SH2 => R_KD_Y1_P_1_S1_PTP_SH2_1; kon_S1*R_KD_Y1_P*S1_PTP_SH2;
  R2: R_KD_Y1_P + S2_SH2_Y_U => R_KD_Y1_P_1_S2_SH2_1_Y_U; kon_S2*R_KD_Y1_P*S2_SH2_Y_U;
  R3: R_KD_Y1_P_1_S1_PTP_SH2_1 => R_KD_Y1_P + S1_PTP_SH2; koff_S1*R_KD_Y1_P_1_S1_PTP_SH2_1;
  R4: R_KD_Y1_P_1_S2_SH2_1_Y_U => R_KD_Y1_P + S2_SH2_Y_U; koff_S2*R_KD_Y1_P_1_S2_SH2_1_Y_U;
  R5: R_KD_Y1_P_1_S2_SH2_1_Y_U => R_KD_1_Y1_P_2_S2_SH2_2_Y_U_1; kp1_KD*R_KD_Y1_P_1_S2_SH2_1_Y_U;
  R6: R_KD_1_Y1_P_2_S2_SH2_2_Y_U_1 => R_KD_Y1_P_1_S2_SH2_1_Y_U; km1_KD*R_KD_1_Y1_P_2_S2_SH2_2_Y_U_1;
  R7: R_KD_1_Y1_P_2_S2_SH2_2_Y_U_1 => R_KD_Y1_P_1_S2_SH2_1_Y_P; kcat_KD*R_KD_1_Y1_P_2_S2_SH2_2_Y_U_1;
  R8: R_KD_Y1_P_1_S2_SH2_1_Y_P => R_KD_Y1_P + S2_SH2_Y_P; koff_S2*R_KD_Y1_P_1_S2_SH2_1_Y_P;
  R9: S1_PTP_SH2 + R_KD_Y1_P_1_S2_SH2_1_Y_P => S9; kp1_PTP*S1_PTP_SH2*R_KD_Y1_P_1_S2_SH2_1_Y_P;
  R10: R_KD_Y1_P_1_S1_PTP_SH2_1 + R_KD_Y1_P_1_S2_SH2_1_Y_P => S10; 100*kp1_PTP*R_KD_Y1_P_1_S1_PTP_SH2_1*R_KD_Y1_P_1_S2_SH2_1_Y_P;
  R11: R_KD_Y1_P + S9 => S10; 100*kon_S1*R_KD_Y1_P*S9;
  R12: S10 => R_KD_Y1_P + S9; koff_S1*S10;
  R13: R_KD_Y1_P + S2_SH2_Y_P => R_KD_Y1_P_1_S2_SH2_1_Y_P; kon_S2*R_KD_Y1_P*S2_SH2_Y_P;
  R14: S9 => R_KD_Y1_P + S1_PTP_1_SH2_S2_SH2_Y_P_1; koff_S2*S9;
  R15: S10 => R_KD_Y1_P + S12; koff_S2*S10;
  R16: S1_PTP_SH2 + S2_SH2_Y_P => S1_PTP_1_SH2_S2_SH2_Y_P_1; kp1_PTP*S1_PTP_SH2*S2_SH2_Y_P;
  R17: R_KD_Y1_P_1_S1_PTP_SH2_1 + S2_SH2_Y_P => S12; kp1_PTP*R_KD_Y1_P_1_S1_PTP_SH2_1*S2_SH2_Y_P;
  R18: S9 => S1_PTP_SH2 + R_KD_Y1_P_1_S2_SH2_1_Y_P; km1_PTP*S9;
  R19: S10 => R_KD_Y1_P_1_S1_PTP_SH2_1 + R_KD_Y1_P_1_S2_SH2_1_Y_P; km1_PTP*S10;
  R20: S9 => S1_PTP_SH2 + R_KD_Y1_P_1_S2_SH2_1_Y_U; kcat_PTP*S9;
  R21: S10 => R_KD_Y1_P_1_S1_PTP_SH2_1 + R_KD_Y1_P_1_S2_SH2_1_Y_U; kcat_PTP*S10;
  R22: R_KD_Y1_P + S1_PTP_1_SH2_S2_SH2_Y_P_1 => S12; kon_S1*R_KD_Y1_P*S1_PTP_1_SH2_S2_SH2_Y_P_1;
  R23: S12 => R_KD_Y1_P + S1_PTP_1_SH2_S2_SH2_Y_P_1; koff_S1*S12;
  R24: R_KD_Y1_P + S1_PTP_1_SH2_S2_SH2_Y_P_1 => S9; kon_S2*R_KD_Y1_P*S1_PTP_1_SH2_S2_SH2_Y_P_1;
  R25: R_KD_Y1_P + S12 => S10; 100*kon_S2*R_KD_Y1_P*S12;
  R26: S1_PTP_1_SH2_S2_SH2_Y_P_1 => S1_PTP_SH2 + S2_SH2_Y_P; km1_PTP*S1_PTP_1_SH2_S2_SH2_Y_P_1;
  R27: S12 => R_KD_Y1_P_1_S1_PTP_SH2_1 + S2_SH2_Y_P; km1_PTP*S12;
  R28: S1_PTP_1_SH2_S2_SH2_Y_P_1 => S1_PTP_SH2 + S2_SH2_Y_U; kcat_PTP*S1_PTP_1_SH2_S2_SH2_Y_P_1;
  R29: S12 => S2_SH2_Y_U + R_KD_Y1_P_1_S1_PTP_SH2_1; kcat_PTP*S12;
end
