// SBML level 2 version 3

model Motivating_example()

  // Compartments:
  compartment cell = 1;

  // Species:
  species L_d_loc_EC_r in cell = 310.58546/cell; L_d_loc_EC_r is "L(d,loc~EC,r)";
  species R_l_loc_PM_tf_Y in cell = 0.49180364/cell; R_l_loc_PM_tf_Y is "R(l,loc~PM,tf~Y)";
  species TF_d_Y_dna_im_loc_CP_r in cell = 13.434166/cell; TF_d_Y_dna_im_loc_CP_r is "TF(d~Y,dna,im,loc~CP,r)";
  species DNA_p1_p2 in cell = 1.2502025/cell; DNA_p1_p2 is "DNA(p1,p2)";
  species Im_cargo_fg_loc_CP in cell = 13.491541/cell; Im_cargo_fg_loc_CP is "Im(cargo,fg,loc~CP)";
  species NP_fg in cell = 1.6213032/cell; NP_fg is "NP(fg)";
  species $Sink in cell = 0; Sink is "Sink()";
  species L_d_1_loc_EC_r_L_d_1_loc_EC_r in cell = 241.07022/cell; L_d_1_loc_EC_r_L_d_1_loc_EC_r is "L(d!1,loc~EC,r).L(d!1,loc~EC,r)";
  species L_d_loc_EC_r_1_R_l_1_loc_PM_tf_Y in cell = 0.77527286/cell; L_d_loc_EC_r_1_R_l_1_loc_PM_tf_Y is "L(d,loc~EC,r!1).R(l!1,loc~PM,tf~Y)";
  species Im_cargo_fg_1_loc_CP_NP_fg_1 in cell = 0.77593343/cell; Im_cargo_fg_1_loc_CP_NP_fg_1 is "Im(cargo,fg!1,loc~CP).NP(fg!1)";
  species S11 in cell = 1.2291434/cell; S11 is "L(d!1,loc~EC,r!2).L(d!1,loc~EC,r).R(l!2,loc~PM,tf~Y)";
  species S12 in cell = 0.048553887/cell; S12 is "L(d!1,loc~EC,r!2).L(d!1,loc~EC,r!3).R(l!2,loc~PM,tf~Y).R(l!3,loc~PM,tf~Y)";
  species Im_cargo_fg_1_loc_NU_NP_fg_1 in cell = 1.0769233/cell; Im_cargo_fg_1_loc_NU_NP_fg_1 is "Im(cargo,fg!1,loc~NU).NP(fg!1)";
  species S14 in cell = 0.21327631/cell; S14 is "L(d!1,loc~EN,r!2).L(d!1,loc~EN,r!3).R(l!2,loc~EM,tf~Y).R(l!3,loc~EM,tf~Y)";
  species S15 in cell = 0.43932613/cell; S15 is "L(d!1,loc~EC,r!2).L(d!1,loc~EC,r!3).R(l!2,loc~PM,tf~Y).R(l!3,loc~PM,tf~pY)";
  species Im_cargo_fg_loc_NU in cell = 6.6312316/cell; Im_cargo_fg_loc_NU is "Im(cargo,fg,loc~NU)";
  species S17 in cell = 2.899674/cell; S17 is "L(d,loc~EC,r!1).R(l!1,loc~PM,tf~pY)";
  species L_d_loc_EN_r_1_R_l_1_loc_EM_tf_Y in cell = 0.48794006/cell; L_d_loc_EN_r_1_R_l_1_loc_EM_tf_Y is "L(d,loc~EN,r!1).R(l!1,loc~EM,tf~Y)";
  species S19 in cell = 4.3761154/cell; S19 is "L(d!1,loc~EC,r!2).L(d!1,loc~EC,r).R(l!2,loc~PM,tf~pY)";
  species R_l_loc_PM_tf_pY in cell = 1.9220406/cell; R_l_loc_PM_tf_pY is "R(l,loc~PM,tf~pY)";
  species S21 in cell = 0.33874071/cell; S21 is "L(d!1,loc~EN,r!2).L(d!1,loc~EN,r).R(l!2,loc~EM,tf~Y)";
  species R_l_loc_EM_tf_Y in cell = 0.70576423/cell; R_l_loc_EM_tf_Y is "R(l,loc~EM,tf~Y)";
  species S23 in cell = 3.2364987/cell; S23 is "L(d!1,loc~EN,r!2).L(d!1,loc~EN,r!3).R(l!2,loc~EM,tf~Y).R(l!3,loc~EM,tf~pY)";
  species S24 in cell = 1.0992458/cell; S24 is "L(d!1,loc~EC,r!2).L(d!1,loc~EC,r!3).R(l!2,loc~PM,tf~pY).R(l!3,loc~PM,tf~pY)";
  species S25 in cell = 0.67152937/cell; S25 is "L(d!1,loc~EC,r!2).L(d!1,loc~EC,r!3).R(l!2,loc~PM,tf~Y).R(l!3,loc~PM,tf~pY!4).TF(d~Y,dna,im,loc~CP,r!4)";
  species L_d_loc_EN_r in cell = 3.4381638/cell; L_d_loc_EN_r is "L(d,loc~EN,r)";
  species S27 in cell = 4.3224247/cell; S27 is "L(d,loc~EC,r!1).R(l!1,loc~PM,tf~pY!2).TF(d~Y,dna,im,loc~CP,r!2)";
  species S28 in cell = 3.713574/cell; S28 is "L(d,loc~EN,r!1).R(l!1,loc~EM,tf~pY)";
  species L_d_1_loc_EN_r_L_d_1_loc_EN_r in cell = 1.2042226/cell; L_d_1_loc_EN_r_L_d_1_loc_EN_r is "L(d!1,loc~EN,r).L(d!1,loc~EN,r)";
  species S30 in cell = 6.7422699/cell; S30 is "L(d!1,loc~EC,r!2).L(d!1,loc~EC,r).R(l!2,loc~PM,tf~pY!3).TF(d~Y,dna,im,loc~CP,r!3)";
  species S31 in cell = 2.782692/cell; S31 is "R(l,loc~PM,tf~pY!1).TF(d~Y,dna,im,loc~CP,r!1)";
  species S32 in cell = 2.6207445/cell; S32 is "L(d!1,loc~EN,r!2).L(d!1,loc~EN,r).R(l!2,loc~EM,tf~pY)";
  species R_l_loc_EM_tf_pY in cell = 5.2532412/cell; R_l_loc_EM_tf_pY is "R(l,loc~EM,tf~pY)";
  species S34 in cell = 12.694846/cell; S34 is "L(d!1,loc~EN,r!2).L(d!1,loc~EN,r!3).R(l!2,loc~EM,tf~pY).R(l!3,loc~EM,tf~pY)";
  species S35 in cell = 3.7712747/cell; S35 is "L(d!1,loc~EN,r!2).L(d!1,loc~EN,r!3).R(l!2,loc~EM,tf~Y).R(l!3,loc~EM,tf~pY!4).TF(d~Y,dna,im,loc~CP,r!4)";
  species S36 in cell = 3.5675992/cell; S36 is "L(d!1,loc~EC,r!2).L(d!1,loc~EC,r!3).R(l!3,loc~PM,tf~pY!4).R(l!2,loc~PM,tf~pY).TF(d~Y,dna,im,loc~CP,r!4)";
  species S37 in cell = 1.554601/cell; S37 is "L(d!1,loc~EC,r!2).L(d!1,loc~EC,r!3).R(l!2,loc~PM,tf~pY!4).R(l!3,loc~PM,tf~pY!5).TF(d~Y,dna,im,loc~CP,r!4).TF(d~Y,dna,im,loc~CP,r!5)";
  species S38 in cell = 3.6743561/cell; S38 is "L(d,loc~EN,r!1).R(l!1,loc~EM,tf~pY!2).TF(d~Y,dna,im,loc~CP,r!2)";
  species S39 in cell = 2.5701885/cell; S39 is "L(d!1,loc~EN,r!2).L(d!1,loc~EN,r).R(l!2,loc~EM,tf~pY!3).TF(d~Y,dna,im,loc~CP,r!3)";
  species S40 in cell = 5.2618201/cell; S40 is "R(l,loc~EM,tf~pY!1).TF(d~Y,dna,im,loc~CP,r!1)";
  species S41 in cell = 31.335051/cell; S41 is "L(d!1,loc~EN,r!2).L(d!1,loc~EN,r!3).R(l!3,loc~EM,tf~pY!4).R(l!2,loc~EM,tf~pY).TF(d~Y,dna,im,loc~CP,r!4)";
  species S42 in cell = 10.477692/cell; S42 is "L(d!1,loc~EN,r!2).L(d!1,loc~EN,r!3).R(l!2,loc~EM,tf~pY!4).R(l!3,loc~EM,tf~pY!5).TF(d~Y,dna,im,loc~CP,r!4).TF(d~Y,dna,im,loc~CP,r!5)";
  species S43 in cell = 0.36100488/cell; S43 is "L(d!1,loc~EC,r!2).L(d!1,loc~EC,r!3).R(l!2,loc~PM,tf~pY!4).R(l!3,loc~PM,tf~pY!5).TF(d~Y,dna,im,loc~CP,r!4).TF(d~pY,dna,im,loc~CP,r!5)";
  species S44 in cell = 0.15718592/cell; S44 is "L(d,loc~EC,r!1).R(l!1,loc~PM,tf~pY!2).TF(d~pY,dna,im,loc~CP,r!2)";
  species S45 in cell = 0.23074489/cell; S45 is "L(d!1,loc~EC,r!2).L(d!1,loc~EC,r).R(l!2,loc~PM,tf~pY!3).TF(d~pY,dna,im,loc~CP,r!3)";
  species S46 in cell = 0.10764401/cell; S46 is "R(l,loc~PM,tf~pY!1).TF(d~pY,dna,im,loc~CP,r!1)";
  species S47 in cell = 2.8660935/cell; S47 is "L(d!1,loc~EN,r!2).L(d!1,loc~EN,r!3).R(l!2,loc~EM,tf~pY!4).R(l!3,loc~EM,tf~pY!5).TF(d~Y,dna,im,loc~CP,r!4).TF(d~pY,dna,im,loc~CP,r!5)";
  species S48 in cell = 0.1265848/cell; S48 is "L(d!1,loc~EC,r!2).L(d!1,loc~EC,r!3).R(l!3,loc~PM,tf~pY!4).R(l!2,loc~PM,tf~pY).TF(d~pY,dna,im,loc~CP,r!4)";
  species TF_d_pY_dna_im_loc_CP_r in cell = 20.473447/cell; TF_d_pY_dna_im_loc_CP_r is "TF(d~pY,dna,im,loc~CP,r)";
  species S50 in cell = 0.017321442/cell; S50 is "L(d!1,loc~EC,r!2).L(d!1,loc~EC,r!3).R(l!2,loc~PM,tf~pY!4).R(l!3,loc~PM,tf~pY!5).TF(d~pY,dna,im,loc~CP,r!4).TF(d~pY,dna,im,loc~CP,r!5)";
  species S51 in cell = 0.021642091/cell; S51 is "L(d!1,loc~EC,r!2).L(d!1,loc~EC,r!3).R(l!2,loc~PM,tf~Y).R(l!3,loc~PM,tf~pY!4).TF(d~pY,dna,im,loc~CP,r!4)";
  species S52 in cell = 0.24510365/cell; S52 is "L(d,loc~EN,r!1).R(l!1,loc~EM,tf~pY!2).TF(d~pY,dna,im,loc~CP,r!2)";
  species S53 in cell = 0.17885971/cell; S53 is "L(d!1,loc~EN,r!2).L(d!1,loc~EN,r).R(l!2,loc~EM,tf~pY!3).TF(d~pY,dna,im,loc~CP,r!3)";
  species S54 in cell = 0.33431695/cell; S54 is "R(l,loc~EM,tf~pY!1).TF(d~pY,dna,im,loc~CP,r!1)";
  species S55 in cell = 1.4666424/cell; S55 is "L(d!1,loc~EN,r!2).L(d!1,loc~EN,r!3).R(l!3,loc~EM,tf~pY!4).R(l!2,loc~EM,tf~pY).TF(d~pY,dna,im,loc~CP,r!4)";
  species S56 in cell = 0.15196821/cell; S56 is "L(d!1,loc~EN,r!2).L(d!1,loc~EN,r!3).R(l!2,loc~EM,tf~pY!4).R(l!3,loc~EM,tf~pY!5).TF(d~pY,dna,im,loc~CP,r!4).TF(d~pY,dna,im,loc~CP,r!5)";
  species S57 in cell = 0.16841844/cell; S57 is "L(d!1,loc~EN,r!2).L(d!1,loc~EN,r!3).R(l!2,loc~EM,tf~Y).R(l!3,loc~EM,tf~pY!4).TF(d~pY,dna,im,loc~CP,r!4)";
  species S58 in cell = 5.0820461/cell; S58 is "TF(d~pY!1,dna,im,loc~CP,r).TF(d~pY!1,dna,im,loc~CP,r)";
  species S59 in cell = 15.753816/cell; S59 is "Im(cargo!1!2,fg,loc~CP).TF(d~pY!3,dna,im!1,loc~CP,r).TF(d~pY!3,dna,im!2,loc~CP,r)";
  species S60 in cell = 0.39530619/cell; S60 is "Im(cargo!1!2,fg!3,loc~CP).NP(fg!3).TF(d~pY!4,dna,im!1,loc~CP,r).TF(d~pY!4,dna,im!2,loc~CP,r)";
  species S61 in cell = 0.091120647/cell; S61 is "Im(cargo!1!2,fg!3,loc~NU).NP(fg!3).TF(d~pY!4,dna,im!1,loc~NU,r).TF(d~pY!4,dna,im!2,loc~NU,r)";
  species S62 in cell = 5.9066912/cell; S62 is "TF(d~pY!1,dna,im,loc~NU,r).TF(d~pY!1,dna,im,loc~NU,r)";
  species S63 in cell = 0.39308537/cell; S63 is "Im(cargo!1!2,fg,loc~NU).TF(d~pY!3,dna,im!1,loc~NU,r).TF(d~pY!3,dna,im!2,loc~NU,r)";
  species TF_d_pY_dna_im_loc_NU_r in cell = 10.788251/cell; TF_d_pY_dna_im_loc_NU_r is "TF(d~pY,dna,im,loc~NU,r)";
  species S65 in cell = 0.72351243/cell; S65 is "DNA(p1!1!2,p2).TF(d~pY!3,dna!1,im,loc~NU,r).TF(d~pY!3,dna!2,im,loc~NU,r)";
  species mRNA1_loc_NU in cell = 0.36273086/cell; mRNA1_loc_NU is "mRNA1(loc~NU)";
  species mRNA1_loc_CP in cell = 0.35480601/cell; mRNA1_loc_CP is "mRNA1(loc~CP)";
  species P1_dna_im_loc_CP in cell = 1.0119495/cell; P1_dna_im_loc_CP is "P1(dna,im,loc~CP)";
  species S69 in cell = 1.34129/cell; S69 is "Im(cargo!1,fg,loc~CP).P1(dna,im!1,loc~CP)";
  species S70 in cell = 0.035023048/cell; S70 is "Im(cargo!1,fg!2,loc~CP).NP(fg!2).P1(dna,im!1,loc~CP)";
  species S71 in cell = 0.0043901849/cell; S71 is "Im(cargo!1,fg!2,loc~NU).NP(fg!2).P1(dna,im!1,loc~NU)";
  species P1_dna_im_loc_NU in cell = 0.15431286/cell; P1_dna_im_loc_NU is "P1(dna,im,loc~NU)";
  species S73 in cell = 0.010339688/cell; S73 is "Im(cargo!1,fg,loc~NU).P1(dna,im!1,loc~NU)";
  species DNA_p1_p2_1_P1_dna_1_im_loc_NU in cell = 0.01664965/cell; DNA_p1_p2_1_P1_dna_1_im_loc_NU is "DNA(p1,p2!1).P1(dna!1,im,loc~NU)";
  species S75 in cell = 0.0096354224/cell; S75 is "DNA(p1!1!2,p2!3).P1(dna!3,im,loc~NU).TF(d~pY!4,dna!1,im,loc~NU,r).TF(d~pY!4,dna!2,im,loc~NU,r)";
  species mRNA2_loc_NU in cell = 0.01275759/cell; mRNA2_loc_NU is "mRNA2(loc~NU)";
  species mRNA2_loc_CP in cell = 0.011993377/cell; mRNA2_loc_CP is "mRNA2(loc~CP)";
  species P2 in cell = 0.063846962/cell; P2 is "P2()";

  // Parameters:
  nEndo = 5;
  vol_EC = 20;
  vol_CP = 4;
  vol_NU = 1;
  sa_PM = 0.4;
  sa_NM = 0.1;
  eff_width = 1;
  L0 = 1000;
  R0 = 200;
  TF0 = 200;
  DNA0 = 2;
  Im0 = 40;
  NP0 = 4;
  kp_LR = 0.1;
  km_LR = 1;
  kp_LL = 0.1;
  km_LL = 1;
  k_R_endo = 1;
  k_recycle = 0.1;
  k_R_transphos = 1;
  k_R_dephos = 0.1;
  kp_R_TF = 0.1;
  km_R_TF = 0.1;
  kp_R_TFp = 0.1;
  km_R_TFp = 10;
  k_TF_transphos = 1;
  k_TF_dephos = 1;
  kp_TF_TF = 0.1;
  km_TF_TF = 1;
  kp_TF_p1 = 0.1;
  km_TF_p1 = 1;
  k_transcribe = 1;
  k_translate = 1;
  k_mRNA_to_CP = 1;
  k_mRNA_deg = 1;
  k_P_deg = 0.1;
  k_Im_bind_CP = 0.1;
  k_Im_unbind_CP = 0.1;
  k_Im_bind_NU = 0.1;
  k_Im_unbind_NU = 10;
  k_Im_enters_NP = 0.1;
  k_Im_exits_NP = 1;
  k_Im_cross_NP = 1;
  kp_P1_p2 = 0.1;
  km_P1_p2 = 1;
  vol_EN = 0.1*nEndo;
  sa_EM = 0.01*nEndo;
  eVol_PM = sa_PM*eff_width;
  eVol_NM = sa_NM*eff_width;
  eVol_EM = sa_EM*eff_width;
  _rateLaw1 = kp_LL/vol_EC;
  _rateLaw2 = kp_LL/vol_EN;
  _rateLaw3 = kp_LL/vol_EC;
  _rateLaw4 = kp_LL/vol_EN;
  _rateLaw5 = kp_LL/eVol_PM;
  _rateLaw6 = kp_LL/eVol_EM;
  _rateLaw7 = kp_LR/vol_EC;
  _rateLaw8 = kp_LR/vol_EN;
  _rateLaw9 = kp_LR/eVol_PM;
  _rateLaw10 = kp_LR/eVol_EM;
  _rateLaw11 = kp_R_TF/vol_CP;
  _rateLaw12 = kp_R_TFp/vol_CP;
  _rateLaw13 = kp_TF_TF/vol_CP;
  _rateLaw14 = kp_TF_TF/vol_NU;
  _rateLaw15 = kp_TF_p1/vol_NU;
  _rateLaw16 = k_Im_bind_CP/vol_CP;
  _rateLaw17 = k_Im_bind_NU/vol_NU;
  _rateLaw18 = k_Im_bind_CP/vol_CP;
  _rateLaw19 = k_Im_bind_NU/vol_NU;
  _rateLaw20 = k_Im_enters_NP/vol_CP;
  _rateLaw21 = k_Im_enters_NP/vol_NU;
  _rateLaw22 = kp_P1_p2/vol_NU;

  // Assignment rules:
  Tot_L := L_d_loc_EC_r + 2*L_d_1_loc_EC_r_L_d_1_loc_EC_r + L_d_loc_EC_r_1_R_l_1_loc_PM_tf_Y + 2*S11 + 2*S12 + 2*S14 + 2*S15 + S17 + L_d_loc_EN_r_1_R_l_1_loc_EM_tf_Y + 2*S19 + 2*S21 + 2*S23 + 2*S24 + 2*S25 + L_d_loc_EN_r + S27 + S28 + 2*L_d_1_loc_EN_r_L_d_1_loc_EN_r + 2*S30 + 2*S32 + 2*S34 + 2*S35 + 2*S36 + 2*S37 + S38 + 2*S39 + 2*S41 + 2*S42 + 2*S43 + S44 + 2*S45 + 2*S47 + 2*S48 + 2*S50 + 2*S51 + S52 + 2*S53 + 2*S55 + 2*S56 + 2*S57;
  Tot_R := R_l_loc_PM_tf_Y + L_d_loc_EC_r_1_R_l_1_loc_PM_tf_Y + S11 + 2*S12 + 2*S14 + 2*S15 + S17 + L_d_loc_EN_r_1_R_l_1_loc_EM_tf_Y + S19 + R_l_loc_PM_tf_pY + S21 + R_l_loc_EM_tf_Y + 2*S23 + 2*S24 + 2*S25 + S27 + S28 + S30 + S31 + S32 + R_l_loc_EM_tf_pY + 2*S34 + 2*S35 + 2*S36 + 2*S37 + S38 + S39 + S40 + 2*S41 + 2*S42 + 2*S43 + S44 + S45 + S46 + 2*S47 + 2*S48 + 2*S50 + 2*S51 + S52 + S53 + S54 + 2*S55 + 2*S56 + 2*S57;
  Tot_TF := TF_d_Y_dna_im_loc_CP_r + S25 + S27 + S30 + S31 + S35 + S36 + 2*S37 + S38 + S39 + S40 + S41 + 2*S42 + 2*S43 + S44 + S45 + S46 + 2*S47 + S48 + TF_d_pY_dna_im_loc_CP_r + 2*S50 + S51 + S52 + S53 + S54 + S55 + 2*S56 + S57 + 2*S58 + 2*S59 + 2*S60 + 2*S61 + 2*S62 + 2*S63 + TF_d_pY_dna_im_loc_NU_r + 2*S65 + 2*S75;
  Tot_DNA := DNA_p1_p2 + S65 + DNA_p1_p2_1_P1_dna_1_im_loc_NU + S75;
  Tot_mRNA1 := mRNA1_loc_NU + mRNA1_loc_CP;
  Tot_mRNA2 := mRNA2_loc_NU + mRNA2_loc_CP;
  Tot_P1 := P1_dna_im_loc_CP + S69 + S70 + S71 + P1_dna_im_loc_NU + S73 + DNA_p1_p2_1_P1_dna_1_im_loc_NU + S75;
  Tot_P2 := 0 + P2;
  Tot_NP := NP_fg + Im_cargo_fg_1_loc_CP_NP_fg_1 + Im_cargo_fg_1_loc_NU_NP_fg_1 + S60 + S61 + S70 + S71;
  Tot_Im := Im_cargo_fg_loc_CP + Im_cargo_fg_1_loc_CP_NP_fg_1 + Im_cargo_fg_1_loc_NU_NP_fg_1 + Im_cargo_fg_loc_NU + S59 + S60 + S61 + S63 + S69 + S70 + S71 + S73;
  L_Dimers_EC := 0 + L_d_1_loc_EC_r_L_d_1_loc_EC_r;
  L_Dimers_PM := S11 + S12 + S15 + S19 + S24 + S25 + S30 + S36 + S37 + S43 + S45 + S48 + S50 + S51;
  L_Dimers_EN := 0 + L_d_1_loc_EN_r_L_d_1_loc_EN_r;
  L_Dimers_EM := S14 + S21 + S23 + S32 + S34 + S35 + S39 + S41 + S42 + S47 + S53 + S55 + S56 + S57;
  L_Bound_PM := L_d_loc_EC_r_1_R_l_1_loc_PM_tf_Y + 2*S11 + 2*S12 + 2*S15 + S17 + 2*S19 + 2*S24 + 2*S25 + S27 + 2*S30 + 2*S36 + 2*S37 + 2*S43 + S44 + 2*S45 + 2*S48 + 2*S50 + 2*S51;
  L_Bound_EM := 2*S14 + L_d_loc_EN_r_1_R_l_1_loc_EM_tf_Y + 2*S21 + 2*S23 + S28 + 2*S32 + 2*S34 + 2*S35 + S38 + 2*S39 + 2*S41 + 2*S42 + 2*S47 + S52 + 2*S53 + 2*S55 + 2*S56 + 2*S57;
  R_Dimers_PM := S12 + S15 + S24 + S25 + S36 + S37 + S43 + S48 + S50 + S51;
  R_Dimers_EM := S14 + S23 + S34 + S35 + S41 + S42 + S47 + S55 + S56 + S57;
  Catalytic_R := S15 + S17 + S19 + R_l_loc_PM_tf_pY + S23 + 2*S24 + S25 + S27 + S28 + S30 + S31 + S32 + R_l_loc_EM_tf_pY + 2*S34 + S35 + 2*S36 + 2*S37 + S38 + S39 + S40 + 2*S41 + 2*S42 + 2*S43 + S44 + S45 + S46 + 2*S47 + 2*S48 + 2*S50 + S51 + S52 + S53 + S54 + 2*S55 + 2*S56 + S57;
  Catalytic_TF := S25 + S27 + S30 + S31 + S35 + S36 + 2*S37 + S38 + S39 + S40 + S41 + 2*S42 + 2*S43 + S44 + S45 + S46 + 2*S47 + S48 + 2*S50 + S51 + S52 + S53 + S54 + S55 + 2*S56 + S57;
  Phos_TF := S43 + S44 + S45 + S46 + S47 + S48 + TF_d_pY_dna_im_loc_CP_r + 2*S50 + S51 + S52 + S53 + S54 + S55 + 2*S56 + S57 + 2*S58 + 2*S59 + 2*S60 + 2*S61 + 2*S62 + 2*S63 + TF_d_pY_dna_im_loc_NU_r + 2*S65 + 2*S75;
  TF_Dimer_CP := S58 + S59 + S60;
  TF_Dimer_NU := S61 + S62 + S63 + S65 + S75;
  Bound_prom1 := S65 + S75;
  Bound_prom2 := DNA_p1_p2_1_P1_dna_1_im_loc_NU + S75;
  P1_NU := S71 + P1_dna_im_loc_NU + S73 + DNA_p1_p2_1_P1_dna_1_im_loc_NU + S75;
  P1_CP := P1_dna_im_loc_CP + S69 + S70;
  Im_NU := Im_cargo_fg_1_loc_NU_NP_fg_1 + Im_cargo_fg_loc_NU + S61 + S63 + S71 + S73;
  Im_CP := Im_cargo_fg_loc_CP + Im_cargo_fg_1_loc_CP_NP_fg_1 + S59 + S60 + S69 + S70;
  Im_Cargo_NP := S60 + S61 + S70 + S71;
  P1_NU_free := 0 + P1_dna_im_loc_NU;
  P1_NU_dna := DNA_p1_p2_1_P1_dna_1_im_loc_NU + S75;
  CountSink := 0 + Sink;

  // Reactions:
  R1: L_d_loc_EC_r + L_d_loc_EC_r => L_d_1_loc_EC_r_L_d_1_loc_EC_r; 0.5*_rateLaw1*L_d_loc_EC_r*L_d_loc_EC_r;
  R2: L_d_loc_EC_r + R_l_loc_PM_tf_Y => L_d_loc_EC_r_1_R_l_1_loc_PM_tf_Y; _rateLaw7*L_d_loc_EC_r*R_l_loc_PM_tf_Y;
  R3: Im_cargo_fg_loc_CP + NP_fg => Im_cargo_fg_1_loc_CP_NP_fg_1; _rateLaw20*Im_cargo_fg_loc_CP*NP_fg;
  R4: L_d_1_loc_EC_r_L_d_1_loc_EC_r => L_d_loc_EC_r + L_d_loc_EC_r; km_LL*L_d_1_loc_EC_r_L_d_1_loc_EC_r;
  R5: L_d_loc_EC_r + L_d_loc_EC_r_1_R_l_1_loc_PM_tf_Y => S11; _rateLaw3*L_d_loc_EC_r*L_d_loc_EC_r_1_R_l_1_loc_PM_tf_Y;
  R6: L_d_loc_EC_r_1_R_l_1_loc_PM_tf_Y + L_d_loc_EC_r_1_R_l_1_loc_PM_tf_Y => S12; 0.5*_rateLaw5*L_d_loc_EC_r_1_R_l_1_loc_PM_tf_Y*L_d_loc_EC_r_1_R_l_1_loc_PM_tf_Y;
  R7: R_l_loc_PM_tf_Y + L_d_1_loc_EC_r_L_d_1_loc_EC_r => S11; 2*_rateLaw7*R_l_loc_PM_tf_Y*L_d_1_loc_EC_r_L_d_1_loc_EC_r;
  R8: L_d_loc_EC_r_1_R_l_1_loc_PM_tf_Y => L_d_loc_EC_r + R_l_loc_PM_tf_Y; km_LR*L_d_loc_EC_r_1_R_l_1_loc_PM_tf_Y;
  R9: Im_cargo_fg_1_loc_CP_NP_fg_1 => Im_cargo_fg_loc_CP + NP_fg; k_Im_exits_NP*Im_cargo_fg_1_loc_CP_NP_fg_1;
  R10: Im_cargo_fg_1_loc_CP_NP_fg_1 => Im_cargo_fg_1_loc_NU_NP_fg_1; k_Im_cross_NP*Im_cargo_fg_1_loc_CP_NP_fg_1;
  R11: S11 => L_d_loc_EC_r + L_d_loc_EC_r_1_R_l_1_loc_PM_tf_Y; km_LL*S11;
  R12: S12 => L_d_loc_EC_r_1_R_l_1_loc_PM_tf_Y + L_d_loc_EC_r_1_R_l_1_loc_PM_tf_Y; km_LL*S12;
  R13: S11 => R_l_loc_PM_tf_Y + L_d_1_loc_EC_r_L_d_1_loc_EC_r; km_LR*S11;
  R14: R_l_loc_PM_tf_Y + S11 => S12; _rateLaw9*R_l_loc_PM_tf_Y*S11;
  R15: S12 => R_l_loc_PM_tf_Y + S11; 2*km_LR*S12;
  R16: S12 => S14; k_R_endo*S12;
  R17: S12 => S15; 2*k_R_transphos*S12;
  R18: Im_cargo_fg_1_loc_NU_NP_fg_1 => NP_fg + Im_cargo_fg_loc_NU; k_Im_exits_NP*Im_cargo_fg_1_loc_NU_NP_fg_1;
  R19: Im_cargo_fg_1_loc_NU_NP_fg_1 => Im_cargo_fg_1_loc_CP_NP_fg_1; k_Im_cross_NP*Im_cargo_fg_1_loc_NU_NP_fg_1;
  R20: S15 => L_d_loc_EC_r_1_R_l_1_loc_PM_tf_Y + S17; km_LL*S15;
  R21: S14 => L_d_loc_EN_r_1_R_l_1_loc_EM_tf_Y + L_d_loc_EN_r_1_R_l_1_loc_EM_tf_Y; km_LL*S14;
  R22: S15 => R_l_loc_PM_tf_Y + S19; km_LR*S15;
  R23: S15 => S11 + R_l_loc_PM_tf_pY; km_LR*S15;
  R24: S14 => S21 + R_l_loc_EM_tf_Y; 2*km_LR*S14;
  R25: S15 => S23; k_R_endo*S15;
  R26: S14 => S12; k_recycle*S14;
  R27: S14 => S23; 2*k_R_transphos*S14;
  R28: S15 => S24; k_R_transphos*S15;
  R29: S15 => S12; k_R_dephos*S15;
  R30: TF_d_Y_dna_im_loc_CP_r + S15 => S25; _rateLaw11*TF_d_Y_dna_im_loc_CP_r*S15;
  R31: NP_fg + Im_cargo_fg_loc_NU => Im_cargo_fg_1_loc_NU_NP_fg_1; _rateLaw21*NP_fg*Im_cargo_fg_loc_NU;
  R32: L_d_loc_EC_r + S17 => S19; _rateLaw3*L_d_loc_EC_r*S17;
  R33: S19 => L_d_loc_EC_r + S17; km_LL*S19;
  R34: S21 => L_d_loc_EN_r_1_R_l_1_loc_EM_tf_Y + L_d_loc_EN_r; km_LL*S21;
  R35: L_d_loc_EC_r_1_R_l_1_loc_PM_tf_Y + S17 => S15; _rateLaw5*L_d_loc_EC_r_1_R_l_1_loc_PM_tf_Y*S17;
  R36: S17 + S17 => S24; 0.5*_rateLaw5*S17*S17;
  R37: S24 => S17 + S17; km_LL*S24;
  R38: S25 => L_d_loc_EC_r_1_R_l_1_loc_PM_tf_Y + S27; km_LL*S25;
  R39: L_d_loc_EN_r_1_R_l_1_loc_EM_tf_Y + L_d_loc_EN_r_1_R_l_1_loc_EM_tf_Y => S14; 0.5*_rateLaw6*L_d_loc_EN_r_1_R_l_1_loc_EM_tf_Y*L_d_loc_EN_r_1_R_l_1_loc_EM_tf_Y;
  R40: S23 => L_d_loc_EN_r_1_R_l_1_loc_EM_tf_Y + S28; km_LL*S23;
  R41: L_d_loc_EC_r + R_l_loc_PM_tf_pY => S17; _rateLaw7*L_d_loc_EC_r*R_l_loc_PM_tf_pY;
  R42: L_d_1_loc_EC_r_L_d_1_loc_EC_r + R_l_loc_PM_tf_pY => S19; 2*_rateLaw7*L_d_1_loc_EC_r_L_d_1_loc_EC_r*R_l_loc_PM_tf_pY;
  R43: S17 => L_d_loc_EC_r + R_l_loc_PM_tf_pY; km_LR*S17;
  R44: S19 => L_d_1_loc_EC_r_L_d_1_loc_EC_r + R_l_loc_PM_tf_pY; km_LR*S19;
  R45: L_d_loc_EN_r_1_R_l_1_loc_EM_tf_Y => R_l_loc_EM_tf_Y + L_d_loc_EN_r; km_LR*L_d_loc_EN_r_1_R_l_1_loc_EM_tf_Y;
  R46: S21 => R_l_loc_EM_tf_Y + L_d_1_loc_EN_r_L_d_1_loc_EN_r; km_LR*S21;
  R47: S11 + R_l_loc_PM_tf_pY => S15; _rateLaw9*S11*R_l_loc_PM_tf_pY;
  R48: R_l_loc_PM_tf_Y + S19 => S15; _rateLaw9*R_l_loc_PM_tf_Y*S19;
  R49: S19 + R_l_loc_PM_tf_pY => S24; _rateLaw9*S19*R_l_loc_PM_tf_pY;
  R50: S24 => S19 + R_l_loc_PM_tf_pY; 2*km_LR*S24;
  R51: S25 => R_l_loc_PM_tf_Y + S30; km_LR*S25;
  R52: S25 => S11 + S31; km_LR*S25;
  R53: S21 + R_l_loc_EM_tf_Y => S14; _rateLaw10*S21*R_l_loc_EM_tf_Y;
  R54: S23 => R_l_loc_EM_tf_Y + S32; km_LR*S23;
  R55: S23 => S21 + R_l_loc_EM_tf_pY; km_LR*S23;
  R56: S24 => S34; k_R_endo*S24;
  R57: S25 => S35; k_R_endo*S25;
  R58: R_l_loc_EM_tf_Y => R_l_loc_PM_tf_Y; k_recycle*R_l_loc_EM_tf_Y;
  R59: L_d_loc_EN_r_1_R_l_1_loc_EM_tf_Y => L_d_loc_EC_r_1_R_l_1_loc_PM_tf_Y; k_recycle*L_d_loc_EN_r_1_R_l_1_loc_EM_tf_Y;
  R60: S21 => S11; k_recycle*S21;
  R61: S23 => S15; k_recycle*S23;
  R62: S23 => S34; k_R_transphos*S23;
  R63: S25 => S36; k_R_transphos*S25;
  R64: S17 => L_d_loc_EC_r_1_R_l_1_loc_PM_tf_Y; k_R_dephos*S17;
  R65: S19 => S11; k_R_dephos*S19;
  R66: R_l_loc_PM_tf_pY => R_l_loc_PM_tf_Y; k_R_dephos*R_l_loc_PM_tf_pY;
  R67: S23 => S14; k_R_dephos*S23;
  R68: S24 => S15; 2*k_R_dephos*S24;
  R69: TF_d_Y_dna_im_loc_CP_r + S17 => S27; _rateLaw11*TF_d_Y_dna_im_loc_CP_r*S17;
  R70: TF_d_Y_dna_im_loc_CP_r + S19 => S30; _rateLaw11*TF_d_Y_dna_im_loc_CP_r*S19;
  R71: TF_d_Y_dna_im_loc_CP_r + R_l_loc_PM_tf_pY => S31; _rateLaw11*TF_d_Y_dna_im_loc_CP_r*R_l_loc_PM_tf_pY;
  R72: TF_d_Y_dna_im_loc_CP_r + S23 => S35; _rateLaw11*TF_d_Y_dna_im_loc_CP_r*S23;
  R73: TF_d_Y_dna_im_loc_CP_r + S24 => S36; 2*_rateLaw11*TF_d_Y_dna_im_loc_CP_r*S24;
  R74: S25 => TF_d_Y_dna_im_loc_CP_r + S15; km_R_TF*S25;
  R75: L_d_loc_EN_r + L_d_loc_EN_r => L_d_1_loc_EN_r_L_d_1_loc_EN_r; 0.5*_rateLaw2*L_d_loc_EN_r*L_d_loc_EN_r;
  R76: L_d_1_loc_EN_r_L_d_1_loc_EN_r => L_d_loc_EN_r + L_d_loc_EN_r; km_LL*L_d_1_loc_EN_r_L_d_1_loc_EN_r;
  R77: L_d_loc_EC_r + S27 => S30; _rateLaw3*L_d_loc_EC_r*S27;
  R78: S30 => L_d_loc_EC_r + S27; km_LL*S30;
  R79: L_d_loc_EN_r_1_R_l_1_loc_EM_tf_Y + L_d_loc_EN_r => S21; _rateLaw4*L_d_loc_EN_r_1_R_l_1_loc_EM_tf_Y*L_d_loc_EN_r;
  R80: L_d_loc_EN_r + S28 => S32; _rateLaw4*L_d_loc_EN_r*S28;
  R81: S32 => L_d_loc_EN_r + S28; km_LL*S32;
  R82: L_d_loc_EC_r_1_R_l_1_loc_PM_tf_Y + S27 => S25; _rateLaw5*L_d_loc_EC_r_1_R_l_1_loc_PM_tf_Y*S27;
  R83: S17 + S27 => S36; _rateLaw5*S17*S27;
  R84: S27 + S27 => S37; 0.5*_rateLaw5*S27*S27;
  R85: S36 => S17 + S27; km_LL*S36;
  R86: L_d_loc_EN_r_1_R_l_1_loc_EM_tf_Y + S28 => S23; _rateLaw6*L_d_loc_EN_r_1_R_l_1_loc_EM_tf_Y*S28;
  R87: S28 + S28 => S34; 0.5*_rateLaw6*S28*S28;
  R88: S34 => S28 + S28; km_LL*S34;
  R89: S35 => L_d_loc_EN_r_1_R_l_1_loc_EM_tf_Y + S38; km_LL*S35;
  R90: L_d_loc_EC_r + S31 => S27; _rateLaw7*L_d_loc_EC_r*S31;
  R91: L_d_1_loc_EC_r_L_d_1_loc_EC_r + S31 => S30; 2*_rateLaw7*L_d_1_loc_EC_r_L_d_1_loc_EC_r*S31;
  R92: S27 => L_d_loc_EC_r + S31; km_LR*S27;
  R93: S30 => L_d_1_loc_EC_r_L_d_1_loc_EC_r + S31; km_LR*S30;
  R94: R_l_loc_EM_tf_Y + L_d_loc_EN_r => L_d_loc_EN_r_1_R_l_1_loc_EM_tf_Y; _rateLaw8*R_l_loc_EM_tf_Y*L_d_loc_EN_r;
  R95: L_d_loc_EN_r + R_l_loc_EM_tf_pY => S28; _rateLaw8*L_d_loc_EN_r*R_l_loc_EM_tf_pY;
  R96: R_l_loc_EM_tf_Y + L_d_1_loc_EN_r_L_d_1_loc_EN_r => S21; 2*_rateLaw8*R_l_loc_EM_tf_Y*L_d_1_loc_EN_r_L_d_1_loc_EN_r;
  R97: L_d_1_loc_EN_r_L_d_1_loc_EN_r + R_l_loc_EM_tf_pY => S32; 2*_rateLaw8*L_d_1_loc_EN_r_L_d_1_loc_EN_r*R_l_loc_EM_tf_pY;
  R98: S28 => L_d_loc_EN_r + R_l_loc_EM_tf_pY; km_LR*S28;
  R99: S32 => L_d_1_loc_EN_r_L_d_1_loc_EN_r + R_l_loc_EM_tf_pY; km_LR*S32;
  R100: S11 + S31 => S25; _rateLaw9*S11*S31;
  R101: S19 + S31 => S36; _rateLaw9*S19*S31;
  R102: R_l_loc_PM_tf_Y + S30 => S25; _rateLaw9*R_l_loc_PM_tf_Y*S30;
  R103: R_l_loc_PM_tf_pY + S30 => S36; _rateLaw9*R_l_loc_PM_tf_pY*S30;
  R104: S30 + S31 => S37; _rateLaw9*S30*S31;
  R105: S36 => R_l_loc_PM_tf_pY + S30; km_LR*S36;
  R106: S36 => S19 + S31; km_LR*S36;
  R107: S21 + R_l_loc_EM_tf_pY => S23; _rateLaw10*S21*R_l_loc_EM_tf_pY;
  R108: R_l_loc_EM_tf_Y + S32 => S23; _rateLaw10*R_l_loc_EM_tf_Y*S32;
  R109: S32 + R_l_loc_EM_tf_pY => S34; _rateLaw10*S32*R_l_loc_EM_tf_pY;
  R110: S34 => S32 + R_l_loc_EM_tf_pY; 2*km_LR*S34;
  R111: S35 => R_l_loc_EM_tf_Y + S39; km_LR*S35;
  R112: S35 => S21 + S40; km_LR*S35;
  R113: S36 => S41; k_R_endo*S36;
  R114: R_l_loc_EM_tf_pY => R_l_loc_PM_tf_pY; k_recycle*R_l_loc_EM_tf_pY;
  R115: S28 => S17; k_recycle*S28;
  R116: S32 => S19; k_recycle*S32;
  R117: S34 => S24; k_recycle*S34;
  R118: S35 => S25; k_recycle*S35;
  R119: L_d_loc_EN_r => L_d_loc_EC_r; k_recycle*L_d_loc_EN_r;
  R120: L_d_1_loc_EN_r_L_d_1_loc_EN_r => L_d_1_loc_EC_r_L_d_1_loc_EC_r; k_recycle*L_d_1_loc_EN_r_L_d_1_loc_EN_r;
  R121: S35 => S41; k_R_transphos*S35;
  R122: S28 => L_d_loc_EN_r_1_R_l_1_loc_EM_tf_Y; k_R_dephos*S28;
  R123: S32 => S21; k_R_dephos*S32;
  R124: R_l_loc_EM_tf_pY => R_l_loc_EM_tf_Y; k_R_dephos*R_l_loc_EM_tf_pY;
  R125: S34 => S23; 2*k_R_dephos*S34;
  R126: S36 => S25; k_R_dephos*S36;
  R127: TF_d_Y_dna_im_loc_CP_r + S28 => S38; _rateLaw11*TF_d_Y_dna_im_loc_CP_r*S28;
  R128: TF_d_Y_dna_im_loc_CP_r + S32 => S39; _rateLaw11*TF_d_Y_dna_im_loc_CP_r*S32;
  R129: TF_d_Y_dna_im_loc_CP_r + R_l_loc_EM_tf_pY => S40; _rateLaw11*TF_d_Y_dna_im_loc_CP_r*R_l_loc_EM_tf_pY;
  R130: TF_d_Y_dna_im_loc_CP_r + S34 => S41; 2*_rateLaw11*TF_d_Y_dna_im_loc_CP_r*S34;
  R131: TF_d_Y_dna_im_loc_CP_r + S36 => S37; _rateLaw11*TF_d_Y_dna_im_loc_CP_r*S36;
  R132: S27 => TF_d_Y_dna_im_loc_CP_r + S17; km_R_TF*S27;
  R133: S30 => TF_d_Y_dna_im_loc_CP_r + S19; km_R_TF*S30;
  R134: S31 => TF_d_Y_dna_im_loc_CP_r + R_l_loc_PM_tf_pY; km_R_TF*S31;
  R135: S35 => TF_d_Y_dna_im_loc_CP_r + S23; km_R_TF*S35;
  R136: S36 => TF_d_Y_dna_im_loc_CP_r + S24; km_R_TF*S36;
  R137: L_d_loc_EN_r + S38 => S39; _rateLaw4*L_d_loc_EN_r*S38;
  R138: S39 => L_d_loc_EN_r + S38; km_LL*S39;
  R139: S37 => S27 + S27; km_LL*S37;
  R140: L_d_loc_EN_r_1_R_l_1_loc_EM_tf_Y + S38 => S35; _rateLaw6*L_d_loc_EN_r_1_R_l_1_loc_EM_tf_Y*S38;
  R141: S28 + S38 => S41; _rateLaw6*S28*S38;
  R142: S38 + S38 => S42; 0.5*_rateLaw6*S38*S38;
  R143: S41 => S28 + S38; km_LL*S41;
  R144: L_d_loc_EN_r + S40 => S38; _rateLaw8*L_d_loc_EN_r*S40;
  R145: L_d_1_loc_EN_r_L_d_1_loc_EN_r + S40 => S39; 2*_rateLaw8*L_d_1_loc_EN_r_L_d_1_loc_EN_r*S40;
  R146: S38 => L_d_loc_EN_r + S40; km_LR*S38;
  R147: S39 => L_d_1_loc_EN_r_L_d_1_loc_EN_r + S40; km_LR*S39;
  R148: S37 => S30 + S31; 2*km_LR*S37;
  R149: S21 + S40 => S35; _rateLaw10*S21*S40;
  R150: S32 + S40 => S41; _rateLaw10*S32*S40;
  R151: R_l_loc_EM_tf_Y + S39 => S35; _rateLaw10*R_l_loc_EM_tf_Y*S39;
  R152: R_l_loc_EM_tf_pY + S39 => S41; _rateLaw10*R_l_loc_EM_tf_pY*S39;
  R153: S39 + S40 => S42; _rateLaw10*S39*S40;
  R154: S41 => R_l_loc_EM_tf_pY + S39; km_LR*S41;
  R155: S41 => S32 + S40; km_LR*S41;
  R156: S37 => S42; k_R_endo*S37;
  R157: S40 => S31; k_recycle*S40;
  R158: S38 => S27; k_recycle*S38;
  R159: S39 => S30; k_recycle*S39;
  R160: S41 => S36; k_recycle*S41;
  R161: S41 => S35; k_R_dephos*S41;
  R162: TF_d_Y_dna_im_loc_CP_r + S41 => S42; _rateLaw11*TF_d_Y_dna_im_loc_CP_r*S41;
  R163: S37 => TF_d_Y_dna_im_loc_CP_r + S36; 2*km_R_TF*S37;
  R164: S38 => TF_d_Y_dna_im_loc_CP_r + S28; km_R_TF*S38;
  R165: S39 => TF_d_Y_dna_im_loc_CP_r + S32; km_R_TF*S39;
  R166: S40 => TF_d_Y_dna_im_loc_CP_r + R_l_loc_EM_tf_pY; km_R_TF*S40;
  R167: S41 => TF_d_Y_dna_im_loc_CP_r + S34; km_R_TF*S41;
  R168: S37 => S43; 2*k_TF_transphos*S37;
  R169: S43 => S27 + S44; km_LL*S43;
  R170: S42 => S38 + S38; km_LL*S42;
  R171: S43 => S31 + S45; km_LR*S43;
  R172: S43 => S30 + S46; km_LR*S43;
  R173: S42 => S39 + S40; 2*km_LR*S42;
  R174: S43 => S47; k_R_endo*S43;
  R175: S42 => S37; k_recycle*S42;
  R176: S42 => TF_d_Y_dna_im_loc_CP_r + S41; 2*km_R_TF*S42;
  R177: S43 => TF_d_Y_dna_im_loc_CP_r + S48; km_R_TF*S43;
  R178: S43 => S36 + TF_d_pY_dna_im_loc_CP_r; km_R_TFp*S43;
  R179: S42 => S47; 2*k_TF_transphos*S42;
  R180: S43 => S50; k_TF_transphos*S43;
  R181: S43 => S37; k_TF_dephos*S43;
  R182: L_d_loc_EC_r + S44 => S45; _rateLaw3*L_d_loc_EC_r*S44;
  R183: S45 => L_d_loc_EC_r + S44; km_LL*S45;
  R184: L_d_loc_EC_r_1_R_l_1_loc_PM_tf_Y + S44 => S51; _rateLaw5*L_d_loc_EC_r_1_R_l_1_loc_PM_tf_Y*S44;
  R185: S17 + S44 => S48; _rateLaw5*S17*S44;
  R186: S27 + S44 => S43; _rateLaw5*S27*S44;
  R187: S44 + S44 => S50; 0.5*_rateLaw5*S44*S44;
  R188: S48 => S17 + S44; km_LL*S48;
  R189: S50 => S44 + S44; km_LL*S50;
  R190: S47 => S38 + S52; km_LL*S47;
  R191: L_d_loc_EC_r + S46 => S44; _rateLaw7*L_d_loc_EC_r*S46;
  R192: L_d_1_loc_EC_r_L_d_1_loc_EC_r + S46 => S45; 2*_rateLaw7*L_d_1_loc_EC_r_L_d_1_loc_EC_r*S46;
  R193: S44 => L_d_loc_EC_r + S46; km_LR*S44;
  R194: S45 => L_d_1_loc_EC_r_L_d_1_loc_EC_r + S46; km_LR*S45;
  R195: S11 + S46 => S51; _rateLaw9*S11*S46;
  R196: S19 + S46 => S48; _rateLaw9*S19*S46;
  R197: S30 + S46 => S43; _rateLaw9*S30*S46;
  R198: R_l_loc_PM_tf_Y + S45 => S51; _rateLaw9*R_l_loc_PM_tf_Y*S45;
  R199: R_l_loc_PM_tf_pY + S45 => S48; _rateLaw9*R_l_loc_PM_tf_pY*S45;
  R200: S31 + S45 => S43; _rateLaw9*S31*S45;
  R201: S45 + S46 => S50; _rateLaw9*S45*S46;
  R202: S48 => R_l_loc_PM_tf_pY + S45; km_LR*S48;
  R203: S48 => S19 + S46; km_LR*S48;
  R204: S50 => S45 + S46; 2*km_LR*S50;
  R205: S47 => S40 + S53; km_LR*S47;
  R206: S47 => S39 + S54; km_LR*S47;
  R207: S48 => S55; k_R_endo*S48;
  R208: S50 => S56; k_R_endo*S50;
  R209: S47 => S43; k_recycle*S47;
  R210: S48 => S51; k_R_dephos*S48;
  R211: TF_d_Y_dna_im_loc_CP_r + S48 => S43; _rateLaw11*TF_d_Y_dna_im_loc_CP_r*S48;
  R212: S47 => TF_d_Y_dna_im_loc_CP_r + S55; km_R_TF*S47;
  R213: S15 + TF_d_pY_dna_im_loc_CP_r => S51; _rateLaw12*S15*TF_d_pY_dna_im_loc_CP_r;
  R214: S17 + TF_d_pY_dna_im_loc_CP_r => S44; _rateLaw12*S17*TF_d_pY_dna_im_loc_CP_r;
  R215: S19 + TF_d_pY_dna_im_loc_CP_r => S45; _rateLaw12*S19*TF_d_pY_dna_im_loc_CP_r;
  R216: R_l_loc_PM_tf_pY + TF_d_pY_dna_im_loc_CP_r => S46; _rateLaw12*R_l_loc_PM_tf_pY*TF_d_pY_dna_im_loc_CP_r;
  R217: S23 + TF_d_pY_dna_im_loc_CP_r => S57; _rateLaw12*S23*TF_d_pY_dna_im_loc_CP_r;
  R218: S24 + TF_d_pY_dna_im_loc_CP_r => S48; 2*_rateLaw12*S24*TF_d_pY_dna_im_loc_CP_r;
  R219: S28 + TF_d_pY_dna_im_loc_CP_r => S52; _rateLaw12*S28*TF_d_pY_dna_im_loc_CP_r;
  R220: S32 + TF_d_pY_dna_im_loc_CP_r => S53; _rateLaw12*S32*TF_d_pY_dna_im_loc_CP_r;
  R221: R_l_loc_EM_tf_pY + TF_d_pY_dna_im_loc_CP_r => S54; _rateLaw12*R_l_loc_EM_tf_pY*TF_d_pY_dna_im_loc_CP_r;
  R222: S34 + TF_d_pY_dna_im_loc_CP_r => S55; 2*_rateLaw12*S34*TF_d_pY_dna_im_loc_CP_r;
  R223: S36 + TF_d_pY_dna_im_loc_CP_r => S43; _rateLaw12*S36*TF_d_pY_dna_im_loc_CP_r;
  R224: S41 + TF_d_pY_dna_im_loc_CP_r => S47; _rateLaw12*S41*TF_d_pY_dna_im_loc_CP_r;
  R225: S48 + TF_d_pY_dna_im_loc_CP_r => S50; _rateLaw12*S48*TF_d_pY_dna_im_loc_CP_r;
  R226: S44 => S17 + TF_d_pY_dna_im_loc_CP_r; km_R_TFp*S44;
  R227: S45 => S19 + TF_d_pY_dna_im_loc_CP_r; km_R_TFp*S45;
  R228: S46 => R_l_loc_PM_tf_pY + TF_d_pY_dna_im_loc_CP_r; km_R_TFp*S46;
  R229: S47 => S41 + TF_d_pY_dna_im_loc_CP_r; km_R_TFp*S47;
  R230: S48 => S24 + TF_d_pY_dna_im_loc_CP_r; km_R_TFp*S48;
  R231: S50 => S48 + TF_d_pY_dna_im_loc_CP_r; 2*km_R_TFp*S50;
  R232: S47 => S56; k_TF_transphos*S47;
  R233: S44 => S27; k_TF_dephos*S44;
  R234: S45 => S30; k_TF_dephos*S45;
  R235: S46 => S31; k_TF_dephos*S46;
  R236: S47 => S42; k_TF_dephos*S47;
  R237: S48 => S36; k_TF_dephos*S48;
  R238: TF_d_pY_dna_im_loc_CP_r => TF_d_Y_dna_im_loc_CP_r; k_TF_dephos*TF_d_pY_dna_im_loc_CP_r;
  R239: S50 => S43; 2*k_TF_dephos*S50;
  R240: TF_d_pY_dna_im_loc_CP_r + TF_d_pY_dna_im_loc_CP_r => S58; 0.5*_rateLaw13*TF_d_pY_dna_im_loc_CP_r*TF_d_pY_dna_im_loc_CP_r;
  R241: L_d_loc_EN_r + S52 => S53; _rateLaw4*L_d_loc_EN_r*S52;
  R242: S53 => L_d_loc_EN_r + S52; km_LL*S53;
  R243: S51 => L_d_loc_EC_r_1_R_l_1_loc_PM_tf_Y + S44; km_LL*S51;
  R244: L_d_loc_EN_r_1_R_l_1_loc_EM_tf_Y + S52 => S57; _rateLaw6*L_d_loc_EN_r_1_R_l_1_loc_EM_tf_Y*S52;
  R245: S28 + S52 => S55; _rateLaw6*S28*S52;
  R246: S38 + S52 => S47; _rateLaw6*S38*S52;
  R247: S52 + S52 => S56; 0.5*_rateLaw6*S52*S52;
  R248: S55 => S28 + S52; km_LL*S55;
  R249: S56 => S52 + S52; km_LL*S56;
  R250: S57 => L_d_loc_EN_r_1_R_l_1_loc_EM_tf_Y + S52; km_LL*S57;
  R251: L_d_loc_EN_r + S54 => S52; _rateLaw8*L_d_loc_EN_r*S54;
  R252: L_d_1_loc_EN_r_L_d_1_loc_EN_r + S54 => S53; 2*_rateLaw8*L_d_1_loc_EN_r_L_d_1_loc_EN_r*S54;
  R253: S52 => L_d_loc_EN_r + S54; km_LR*S52;
  R254: S53 => L_d_1_loc_EN_r_L_d_1_loc_EN_r + S54; km_LR*S53;
  R255: S51 => R_l_loc_PM_tf_Y + S45; km_LR*S51;
  R256: S51 => S11 + S46; km_LR*S51;
  R257: S21 + S54 => S57; _rateLaw10*S21*S54;
  R258: S32 + S54 => S55; _rateLaw10*S32*S54;
  R259: S39 + S54 => S47; _rateLaw10*S39*S54;
  R260: R_l_loc_EM_tf_Y + S53 => S57; _rateLaw10*R_l_loc_EM_tf_Y*S53;
  R261: R_l_loc_EM_tf_pY + S53 => S55; _rateLaw10*R_l_loc_EM_tf_pY*S53;
  R262: S40 + S53 => S47; _rateLaw10*S40*S53;
  R263: S53 + S54 => S56; _rateLaw10*S53*S54;
  R264: S55 => R_l_loc_EM_tf_pY + S53; km_LR*S55;
  R265: S55 => S32 + S54; km_LR*S55;
  R266: S56 => S53 + S54; 2*km_LR*S56;
  R267: S57 => R_l_loc_EM_tf_Y + S53; km_LR*S57;
  R268: S57 => S21 + S54; km_LR*S57;
  R269: S51 => S57; k_R_endo*S51;
  R270: S54 => S46; k_recycle*S54;
  R271: S52 => S44; k_recycle*S52;
  R272: S53 => S45; k_recycle*S53;
  R273: S55 => S48; k_recycle*S55;
  R274: S56 => S50; k_recycle*S56;
  R275: S57 => S51; k_recycle*S57;
  R276: S51 => S48; k_R_transphos*S51;
  R277: S57 => S55; k_R_transphos*S57;
  R278: S55 => S57; k_R_dephos*S55;
  R279: TF_d_Y_dna_im_loc_CP_r + S55 => S47; _rateLaw11*TF_d_Y_dna_im_loc_CP_r*S55;
  R280: TF_d_pY_dna_im_loc_CP_r + S55 => S56; _rateLaw12*TF_d_pY_dna_im_loc_CP_r*S55;
  R281: S51 => S15 + TF_d_pY_dna_im_loc_CP_r; km_R_TFp*S51;
  R282: S52 => S28 + TF_d_pY_dna_im_loc_CP_r; km_R_TFp*S52;
  R283: S53 => S32 + TF_d_pY_dna_im_loc_CP_r; km_R_TFp*S53;
  R284: S54 => R_l_loc_EM_tf_pY + TF_d_pY_dna_im_loc_CP_r; km_R_TFp*S54;
  R285: S55 => S34 + TF_d_pY_dna_im_loc_CP_r; km_R_TFp*S55;
  R286: S56 => TF_d_pY_dna_im_loc_CP_r + S55; 2*km_R_TFp*S56;
  R287: S57 => S23 + TF_d_pY_dna_im_loc_CP_r; km_R_TFp*S57;
  R288: S51 => S25; k_TF_dephos*S51;
  R289: S52 => S38; k_TF_dephos*S52;
  R290: S53 => S39; k_TF_dephos*S53;
  R291: S54 => S40; k_TF_dephos*S54;
  R292: S55 => S41; k_TF_dephos*S55;
  R293: S56 => S47; 2*k_TF_dephos*S56;
  R294: S57 => S35; k_TF_dephos*S57;
  R295: S58 => TF_d_pY_dna_im_loc_CP_r + TF_d_pY_dna_im_loc_CP_r; km_TF_TF*S58;
  R296: Im_cargo_fg_loc_CP + S58 => S59; _rateLaw16*Im_cargo_fg_loc_CP*S58;
  R297: Im_cargo_fg_1_loc_CP_NP_fg_1 + S58 => S60; _rateLaw16*Im_cargo_fg_1_loc_CP_NP_fg_1*S58;
  R298: S59 => Im_cargo_fg_loc_CP + S58; k_Im_unbind_CP*S59;
  R299: S60 => Im_cargo_fg_1_loc_CP_NP_fg_1 + S58; k_Im_unbind_CP*S60;
  R300: NP_fg + S59 => S60; _rateLaw20*NP_fg*S59;
  R301: S60 => NP_fg + S59; k_Im_exits_NP*S60;
  R302: S60 => S61; k_Im_cross_NP*S60;
  R303: S61 => Im_cargo_fg_1_loc_NU_NP_fg_1 + S62; k_Im_unbind_NU*S61;
  R304: S61 => NP_fg + S63; k_Im_exits_NP*S61;
  R305: S61 => S60; k_Im_cross_NP*S61;
  R306: S62 => TF_d_pY_dna_im_loc_NU_r + TF_d_pY_dna_im_loc_NU_r; km_TF_TF*S62;
  R307: DNA_p1_p2 + S62 => S65; _rateLaw15*DNA_p1_p2*S62;
  R308: Im_cargo_fg_1_loc_NU_NP_fg_1 + S62 => S61; _rateLaw17*Im_cargo_fg_1_loc_NU_NP_fg_1*S62;
  R309: Im_cargo_fg_loc_NU + S62 => S63; _rateLaw17*Im_cargo_fg_loc_NU*S62;
  R310: S63 => Im_cargo_fg_loc_NU + S62; k_Im_unbind_NU*S63;
  R311: NP_fg + S63 => S61; _rateLaw21*NP_fg*S63;
  R312: TF_d_pY_dna_im_loc_NU_r + TF_d_pY_dna_im_loc_NU_r => S62; 0.5*_rateLaw14*TF_d_pY_dna_im_loc_NU_r*TF_d_pY_dna_im_loc_NU_r;
  R313: S65 => DNA_p1_p2 + S62; km_TF_p1*S65;
  R314: S65 => S65 + mRNA1_loc_NU; k_transcribe*S65;
  R315: mRNA1_loc_NU => mRNA1_loc_CP; k_mRNA_to_CP*mRNA1_loc_NU;
  R316: mRNA1_loc_NU => $Sink; k_mRNA_deg*mRNA1_loc_NU;
  R317: mRNA1_loc_CP => mRNA1_loc_CP + P1_dna_im_loc_CP; k_translate*mRNA1_loc_CP;
  R318: mRNA1_loc_CP => $Sink; k_mRNA_deg*mRNA1_loc_CP;
  R319: P1_dna_im_loc_CP => $Sink; k_P_deg*P1_dna_im_loc_CP;
  R320: Im_cargo_fg_loc_CP + P1_dna_im_loc_CP => S69; _rateLaw18*Im_cargo_fg_loc_CP*P1_dna_im_loc_CP;
  R321: Im_cargo_fg_1_loc_CP_NP_fg_1 + P1_dna_im_loc_CP => S70; _rateLaw18*Im_cargo_fg_1_loc_CP_NP_fg_1*P1_dna_im_loc_CP;
  R322: S69 => Im_cargo_fg_loc_CP + $Sink; k_P_deg*S69;
  R323: S70 => $Sink + Im_cargo_fg_1_loc_CP_NP_fg_1; k_P_deg*S70;
  R324: S69 => Im_cargo_fg_loc_CP + P1_dna_im_loc_CP; k_Im_unbind_CP*S69;
  R325: S70 => Im_cargo_fg_1_loc_CP_NP_fg_1 + P1_dna_im_loc_CP; k_Im_unbind_CP*S70;
  R326: NP_fg + S69 => S70; _rateLaw20*NP_fg*S69;
  R327: S70 => NP_fg + S69; k_Im_exits_NP*S70;
  R328: S70 => S71; k_Im_cross_NP*S70;
  R329: S71 => $Sink + Im_cargo_fg_1_loc_NU_NP_fg_1; k_P_deg*S71;
  R330: S71 => Im_cargo_fg_1_loc_NU_NP_fg_1 + P1_dna_im_loc_NU; k_Im_unbind_NU*S71;
  R331: S71 => NP_fg + S73; k_Im_exits_NP*S71;
  R332: S71 => S70; k_Im_cross_NP*S71;
  R333: P1_dna_im_loc_NU => $Sink; k_P_deg*P1_dna_im_loc_NU;
  R334: S73 => $Sink + Im_cargo_fg_loc_NU; k_P_deg*S73;
  R335: Im_cargo_fg_1_loc_NU_NP_fg_1 + P1_dna_im_loc_NU => S71; _rateLaw19*Im_cargo_fg_1_loc_NU_NP_fg_1*P1_dna_im_loc_NU;
  R336: Im_cargo_fg_loc_NU + P1_dna_im_loc_NU => S73; _rateLaw19*Im_cargo_fg_loc_NU*P1_dna_im_loc_NU;
  R337: S73 => Im_cargo_fg_loc_NU + P1_dna_im_loc_NU; k_Im_unbind_NU*S73;
  R338: NP_fg + S73 => S71; _rateLaw21*NP_fg*S73;
  R339: DNA_p1_p2 + P1_dna_im_loc_NU => DNA_p1_p2_1_P1_dna_1_im_loc_NU; _rateLaw22*DNA_p1_p2*P1_dna_im_loc_NU;
  R340: S65 + P1_dna_im_loc_NU => S75; _rateLaw22*S65*P1_dna_im_loc_NU;
  R341: S62 + DNA_p1_p2_1_P1_dna_1_im_loc_NU => S75; _rateLaw15*S62*DNA_p1_p2_1_P1_dna_1_im_loc_NU;
  R342: S75 => S62 + DNA_p1_p2_1_P1_dna_1_im_loc_NU; km_TF_p1*S75;
  R343: S75 => mRNA1_loc_NU + S75; k_transcribe*S75;
  R344: DNA_p1_p2_1_P1_dna_1_im_loc_NU => DNA_p1_p2_1_P1_dna_1_im_loc_NU + mRNA2_loc_NU; k_transcribe*DNA_p1_p2_1_P1_dna_1_im_loc_NU;
  R345: S75 => S75 + mRNA2_loc_NU; k_transcribe*S75;
  R346: DNA_p1_p2_1_P1_dna_1_im_loc_NU => DNA_p1_p2 + $Sink; k_P_deg*DNA_p1_p2_1_P1_dna_1_im_loc_NU;
  R347: S75 => $Sink + S65; k_P_deg*S75;
  R348: DNA_p1_p2_1_P1_dna_1_im_loc_NU => DNA_p1_p2 + P1_dna_im_loc_NU; km_P1_p2*DNA_p1_p2_1_P1_dna_1_im_loc_NU;
  R349: S75 => S65 + P1_dna_im_loc_NU; km_P1_p2*S75;
  R350: mRNA2_loc_NU => mRNA2_loc_CP; k_mRNA_to_CP*mRNA2_loc_NU;
  R351: mRNA2_loc_NU => $Sink; k_mRNA_deg*mRNA2_loc_NU;
  R352: mRNA2_loc_CP => mRNA2_loc_CP + P2; k_translate*mRNA2_loc_CP;
  R353: mRNA2_loc_CP => $Sink; k_mRNA_deg*mRNA2_loc_CP;
  R354: P2 => $Sink; k_P_deg*P2;

  // Unit definitions:
  unit substance = item;
end
