// SBML level 2 version 3

model gene_expr()

  // Compartments:
  compartment cell = 1;

  // Species:
  species DNA_promoter_0 in cell = 1/cell; DNA_promoter_0 is "DNA(promoter~0)";
  species mRNA in cell = 0; mRNA is "mRNA()";
  species Protein in cell = 0; Protein is "Protein()";
  species $Null in cell = 0; Null is "Null()";
  species DNA_promoter_1 in cell = 0; DNA_promoter_1 is "DNA(promoter~1)";

  // Parameters:
  a = 4;
  b = 10;
  gam = 10;
  kap0 = 0.6;
  kap1 = 0.2;
  d1 = 0.0005;
  d0 = gam*d1;
  k0 = kap0*d1;
  k1 = kap1*d1;
  v0 = a*d1;
  v1 = b*d0;

  // Assignment rules:
  DNA_Active := 0 + DNA_promoter_1;
  DNA_Total := DNA_promoter_0 + DNA_promoter_1;
  mRNA_Total := 0 + mRNA;
  Protein_Total := 0 + Protein;

  // Reactions:
  R1: DNA_promoter_0 => DNA_promoter_1; k0*DNA_promoter_0;
  R2: mRNA => mRNA + Protein; v1*mRNA;
  R3: mRNA => $Null; d0*mRNA;
  R4: Protein => $Null; d1*Protein;
  R5: DNA_promoter_1 => DNA_promoter_0; k1*DNA_promoter_1;
  R6: DNA_promoter_1 => mRNA + DNA_promoter_1; v0*DNA_promoter_1;

  // Unit definitions:
  unit substance = item;
end
