// SBML level 2 version 3

model plain()

  // Compartments:
  compartment cell = 1;

  // Species:
  species S1 in cell = 1/cell; S1 is "A()";
  species S2 in cell = 2/cell; S2 is "B()";
  species S3 in cell = 3/cell; S3 is "C()";
  species S4 in cell = 4/cell; S4 is "D()";
  species S5 in cell = 5/cell; S5 is "AA()";

  // Parameters:
  k1_f = 1;
  k1_r = 0.1;
  k2_f = 1;
  k2_r = 0.1;
  k3_f = 1;
  k3_r = 0.1;

  // Assignment rules:
  A := 0 + S1;
  B := 0 + S2;
  C := 0 + S3;
  D := 0 + S4;
  AA := 0 + S5;
  dim_r := k3_r;

  // Reactions:
  R1: S1 + S2 => S3; k1_f*S1*S2;
  R2: S3 => S1 + S2; k1_r*S3;
  R3: S2 + S3 => S4; k2_f*S2*S3;
  R4: S4 => S2 + S3; k2_r*S4;
  R5: S1 + S1 => S5; 0.5*k3_f*S1*S1;
  R6: S5 => S1 + S1; dim_r*S5;
end
