// SBML level 2 version 3

model plain2()

  // Compartments:
  compartment cell = 1;

  // Species:
  species MolA in cell = 1/cell;
  species MolB in cell = 1/cell;
  species MolA_MolB in cell = 0;
  species MolA_P in cell = 0; MolA_P is "MolA-P";
  species MolB_2 in cell = 0; MolB_2 is "(MolB)2";

  // Parameters:
  k1_f = 1;
  k1_r = 0.1;
  k2_f = 1;
  k2_r = 0.1;
  k3_f = 1;

  // Assignment rules:
  A____ := MolA + MolA_MolB + MolA_P;
  B____ := MolB + MolA_MolB;

  // Reactions:
  R1: MolA + MolB => MolA_MolB; k1_f*MolA*MolB;
  R2: MolA_MolB => MolA_P + MolB; k2_f*MolA_MolB;
  R3: MolA_MolB => MolA + MolB; k1_r*MolA_MolB;
  R4: MolA_P + MolB => MolA_MolB; k2_r*MolA_P*MolB;
  R5: MolB + MolB => MolB_2; k3_f*MolB*MolB;
end
