// SBML level 2 version 3

model test_tfun_sbml()

  // Compartments:
  compartment cell = 1;

  // Species:
  species X in cell = 0; X is "X()";

  // Assignment rules:
  Xtot := 0 + X;
  f_file := piecewise(1, time < 0, 1 + 1*(time - 0), (time >= 0) && (time < 1), 2 + 2*(time - 1), (time >= 1) && (time < 2), 4 + 4*(time - 2), (time >= 2) && (time < 3), 8 + 8*(time - 3), (time >= 3) && (time <= 4), 16);
  f_inline := piecewise(0, time < 0, 0 + 10*(time - 0), (time >= 0) && (time < 1), 10 + 10*(time - 1), (time >= 1) && (time <= 2), 20);

  // Reactions:
  R1: => X; f_file;

  // Unit definitions:
  unit substance = item;
end
