// SBML level 2 version 1

model lotka()

  // Compartments:
  compartment cell = 1;

  // Species:
  species StrandA_t_x_y1_y1l in cell = 1000; StrandA_t_x_y1_y1l is "StrandA(t,x,y1,y1l)";
  species StrandD_t_y2_y2r in cell = 1000; StrandD_t_y2_y2r is "StrandD(t,y2,y2r)";
  species $S3 in cell = 1000; S3 is "Strand1(t,x!1,y1!2).StrandB(i,t,t,x!1,y1!2,y1l,y1l)";
  species $S4 in cell = 100000; S4 is "Strand5(i!1,t!2,t!3,x,y1l!4,y1l!5).StrandA(t!2,x,y1,y1l!4).StrandA(t!3,x,y1,y1l!5).StrandC(i!1)";
  species $S5 in cell = 3000000; S5 is "Strand11(i1!1,t!2,t!3,x,y2!4,y2r!5,y2r!6).StrandD(t!2,y2,y2r!5).StrandD(t!3,y2,y2r!6).StrandF(i1!1,y2!4)";
  species $Strand13_t_y2_1_StrandG_y2_1 in cell = 1000; Strand13_t_y2_1_StrandG_y2_1 is "Strand13(t,y2!1).StrandG(y2!1)";
  species $S7 in cell = 30000; S7 is "Strand7(t,t,x!1,y1!2,y2!3).StrandE(i1,t,t,x!1,y1!2,y2!3,y2r,y2r)";
  species S8 in cell = 0; S8 is "Strand1(t!1,x!2,y1!3).StrandA(t!1,x!2,y1!3,y1l)";
  species StrandB_i_t_t_x_y1_y1l_y1l in cell = 0; StrandB_i_t_t_x_y1_y1l_y1l is "StrandB(i,t,t,x,y1,y1l,y1l)";
  species S10 in cell = 0; S10 is "Strand7(t!1,t,x!2,y1!3,y2!4).StrandA(t!1,x!2,y1!3,y1l).StrandE(i1,t,t,x,y1,y2!4,y2r,y2r)";
  species S11 in cell = 0; S11 is "Strand7(t!1,t,x!2,y1!3,y2!4).StrandD(t!1,y2,y2r).StrandE(i1,t,t,x!2,y1!3,y2!4,y2r,y2r)";
  species S12 in cell = 0; S12 is "Strand13(t!1,y2!2).StrandD(t!1,y2!2,y2r)";
  species StrandG_y2 in cell = 0; StrandG_y2 is "StrandG(y2)";
  species S14 in cell = 0; S14 is "Strand5(i!1,t!2,t!3,x!4,y1l!5,y1l!6).StrandB(i!1,t!2,t!3,x!4,y1,y1l!5,y1l!6)";
  species StrandC_i in cell = 0; StrandC_i is "StrandC(i)";
  species S16 in cell = 0; S16 is "Strand7(t!1,t!2,x!3,y1!4,y2!5).StrandA(t!1,x!3,y1!4,y1l).StrandD(t!2,y2!5,y2r)";
  species StrandE_i1_t_t_x_y1_y2_y2r_y2r in cell = 0; StrandE_i1_t_t_x_y1_y2_y2r_y2r is "StrandE(i1,t,t,x,y1,y2,y2r,y2r)";
  species S18 in cell = 0; S18 is "Strand11(i1!1,t!2,t!3,x!4,y2!5,y2r!6,y2r!7).StrandE(i1!1,t!2,t!3,x!4,y1,y2!5,y2r!6,y2r!7)";
  species StrandF_i1_y2 in cell = 0; StrandF_i1_y2 is "StrandF(i1,y2)";

  // Parameters:
  a0 = 1000;
  d0 = 1000;
  h0 = 1000;
  i0 = 100000;
  k0 = 3000000;
  l0 = 1000;
  p0 = 30000;
  k1 = 1e-5;
  k2 = 1e-5;
  k2b = 0.1;
  k3 = 1e-5;
  k4 = 1e-5;
  k4b = 0.1;
  k5 = 1e-5;
  k6 = 1e-5;
  k7 = 1e-5;
  k8 = 1e-5;
  Prey = 0;
  Predator = 0;
  ED7 = 0;
  AE7 = 0;

  // Assignment rules:
  Group_Prey := 0 + StrandA_t_x_y1_y1l;
  Group_Predator := 0 + StrandD_t_y2_y2r;
  Group_ED7 := 0 + S11;
  Group_AE7 := 0 + S10;

  // Reactions:
  R1: StrandA_t_x_y1_y1l + $S3 => S8 + StrandB_i_t_t_x_y1_y1l_y1l; k1*StrandA_t_x_y1_y1l*S3;
  R2: StrandA_t_x_y1_y1l + $S7 => S10; 2*k2*StrandA_t_x_y1_y1l*S7;
  R3: StrandD_t_y2_y2r + $S7 => S11; 2*k4*StrandD_t_y2_y2r*S7;
  R4: StrandD_t_y2_y2r + $Strand13_t_y2_1_StrandG_y2_1 => S12 + StrandG_y2; k5*StrandD_t_y2_y2r*Strand13_t_y2_1_StrandG_y2_1;
  R5: S10 => StrandA_t_x_y1_y1l + $S7; k2b*S10;
  R6: $S4 + StrandB_i_t_t_x_y1_y1l_y1l => StrandA_t_x_y1_y1l + StrandA_t_x_y1_y1l + S14 + StrandC_i; 4*k3*S4*StrandB_i_t_t_x_y1_y1l_y1l;
  R7: S11 => StrandD_t_y2_y2r + $S7; k4b*S11;
  R8: StrandD_t_y2_y2r + S10 => S16 + StrandE_i1_t_t_x_y1_y2_y2r_y2r; k6*StrandD_t_y2_y2r*S10;
  R9: StrandA_t_x_y1_y1l + S11 => S16 + StrandE_i1_t_t_x_y1_y2_y2r_y2r; k7*StrandA_t_x_y1_y1l*S11;
  R10: $S5 + StrandE_i1_t_t_x_y1_y2_y2r_y2r => StrandD_t_y2_y2r + StrandD_t_y2_y2r + S18 + StrandF_i1_y2; 4*k8*S5*StrandE_i1_t_t_x_y1_y2_y2r_y2r;
end
